// COMSOL Multiphysics 6.4.0.293 model "海缆感应电压二维8.3.mph"
// Outline of the model tree

Parameters
  x30 = 30[m]
  x60 = 60[m]
  x80 = 80[m]
  x140 = 140[m]
  x160 = 160[m]
  y_bed = 3192.197[mm]
  h_mud = 1000[m]
  h_water = 13[m]
  h_air = 1000[m]

Selections
  sel1: Explicit "导体" on domains 12, 21, 30, 40, 49, 61, 71, 80, 92, 102, 111, 123, 133, 142
  sel2: Explicit "半导电" on domains 7, 9, 11, 16, 18, 20, 25, 27, 29, 31-33, 35, 37, 39, 41-44, 46, 48, 50-52, 56, 58, 60, 62-64, 66, 68, 70, 72-75, 77, 79, 81-83, 87, 89, 91, 93-95, 97, 99, 101, 103-106, 108, 110, 112-114, 118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
  sel3: Explicit "绝缘" on domains 4, 6, 10, 13, 15, 19, 22, 24, 28, 36, 38, 47, 53, 55, 59, 67, 69, 78, 84, 86, 90, 98, 100, 109, 115, 117, 121, 129, 131, 140
  sel4: Explicit "护套" on domains 8, 17, 26, 34, 45, 57, 65, 76, 88, 96, 107, 119, 127, 138
  sel5: Explicit "铠装" on domains 5, 14, 23, 54, 85, 116
  sel6: Explicit "海水" on domains 2
  sel7: Explicit "海泥" on domains 1

Geometry
  geom2 "几何 2" (2D, length unit mm)
    c29: Circle "圆 29" | r = 57/2
    c1: Circle "圆 2" | r = 30.95
    c3: Circle "圆 3" | r = 59.15
    c26: Circle "圆 26" | r = 124.3/2
    c4: Circle "圆 4" | r = 132.1/2
    c27: Circle "圆 27" | r = 139.1/2
    c9: Circle "圆 9" | r = 156.4/2
    c10: Circle "圆 10" | r = 166.4/2
    c11: Circle "圆 11" | r = 174.6/2
    c39: Circle "圆 39" | r = 57/2; pos = {x30, 0}
    c40: Circle "圆 40" | r = 30.95; pos = {x30, 0}
    c41: Circle "圆 41" | r = 59.15; pos = {x30, 0}
    c42: Circle "圆 42" | r = 124.3/2; pos = {x30, 0}
    c43: Circle "圆 43" | r = 132.1/2; pos = {x30, 0}
    c44: Circle "圆 44" | r = 139.1/2; pos = {x30, 0}
    c45: Circle "圆 45" | r = 156.4/2; pos = {x30, 0}
    c46: Circle "圆 46" | r = 166.4/2; pos = {x30, 0}
    c47: Circle "圆 47" | r = 174.6/2; pos = {x30, 0}
    c28: Circle "圆 28" | r = 39.1/2; pos = {x60, 0}
    c13: Circle "圆 13" | r = 42.1/2; pos = {x60, 0}
    c15: Circle "圆 15" | r = 90.1/2; pos = {x60, 0}
    c17: Circle "圆 17" | r = 95/2; pos = {x60, 0}
    c18: Circle "圆 18" | r = 102.4/2; pos = {x60, 0}
    c19: Circle "圆 19" | r = 109.2/2; pos = {x60, 0}
    rot1: Rotate "旋转 1"
      input = c13, c15, c17, c18, c19, c28
      keep = on
      rot = 120
      pos = {x60, 54.6/sqrt(3)*2}
      indexattrtag = rot1.index
    rot2: Rotate "旋转 2"
      input = c13, c15, c17, c18, c19, c28
      keep = on
      rot = 240
      pos = {x60, 54.6/sqrt(3)*2}
      indexattrtag = rot2.index
    c23: Circle "圆 23" | r = 239.3/2; pos = {x60, 54.6/sqrt(3)*2}
    c24: Circle "圆 24" | r = 251.3/2; pos = {x60, 54.6/sqrt(3)*2}
    c25: Circle "圆 25" | r = 258.3/2; pos = {x60, 54.6/sqrt(3)*2}
    c30: Circle "圆 30" | r = 39.1/2; pos = {x80, 0}
    c31: Circle "圆 31" | r = 42.1/2; pos = {x80, 0}
    c32: Circle "圆 32" | r = 90.1/2; pos = {x80, 0}
    c33: Circle "圆 33" | r = 95/2; pos = {x80, 0}
    c34: Circle "圆 34" | r = 102.4/2; pos = {x80, 0}
    c35: Circle "圆 35" | r = 109.2/2; pos = {x80, 0}
    rot3: Rotate "旋转 3"
      input = c30, c31, c32, c33, c34, c35
      keep = on
      rot = 120
      pos = {x80, 54.6/sqrt(3)*2}
      indexattrtag = rot1.index
    rot4: Rotate "旋转 4"
      input = c30, c31, c32, c33, c34, c35
      keep = on
      rot = 240
      pos = {x80, 54.6/sqrt(3)*2}
      indexattrtag = rot2.index
    c36: Circle "圆 36" | r = 239.3/2; pos = {x80, 54.6/sqrt(3)*2}
    c37: Circle "圆 37" | r = 251.3/2; pos = {x80, 54.6/sqrt(3)*2}
    c38: Circle "圆 38" | r = 258.3/2; pos = {x80, 54.6/sqrt(3)*2}
    c48: Circle "圆 48" | r = 39.1/2; pos = {x140, 0}
    c49: Circle "圆 49" | r = 42.1/2; pos = {x140, 0}
    c50: Circle "圆 50" | r = 90.1/2; pos = {x140, 0}
    c51: Circle "圆 51" | r = 95/2; pos = {x140, 0}
    c52: Circle "圆 52" | r = 102.4/2; pos = {x140, 0}
    c53: Circle "圆 53" | r = 109.2/2; pos = {x140, 0}
    rot5: Rotate "旋转 5"
      input = c48, c49, c50, c51, c52, c53
      keep = on
      rot = 120
      pos = {x140, 54.6/sqrt(3)*2}
      indexattrtag = rot1.index
    rot6: Rotate "旋转 6"
      input = c48, c49, c50, c51, c52, c53
      keep = on
      rot = 240
      pos = {x140, 54.6/sqrt(3)*2}
      indexattrtag = rot2.index
    c54: Circle "圆 54" | r = 239.3/2; pos = {x140, 54.6/sqrt(3)*2}
    c55: Circle "圆 55" | r = 251.3/2; pos = {x140, 54.6/sqrt(3)*2}
    c56: Circle "圆 56" | r = 258.3/2; pos = {x140, 54.6/sqrt(3)*2}
    c57: Circle "圆 57" | r = 39.1/2; pos = {x160, 0}
    c58: Circle "圆 58" | r = 42.1/2; pos = {x160, 0}
    c59: Circle "圆 59" | r = 90.1/2; pos = {x160, 0}
    c60: Circle "圆 60" | r = 95/2; pos = {x160, 0}
    c61: Circle "圆 61" | r = 102.4/2; pos = {x160, 0}
    c62: Circle "圆 62" | r = 109.2/2; pos = {x160, 0}
    rot7: Rotate "旋转 7"
      input = c57, c58, c59, c60, c61, c62
      keep = on
      rot = 120
      pos = {x160, 54.6/sqrt(3)*2}
      indexattrtag = rot1.index
    rot8: Rotate "旋转 8"
      input = c57, c58, c59, c60, c61, c62
      keep = on
      rot = 240
      pos = {x160, 54.6/sqrt(3)*2}
      indexattrtag = rot2.index
    c63: Circle "圆 63" | r = 239.3/2; pos = {x160, 54.6/sqrt(3)*2}
    c64: Circle "圆 64" | r = 251.3/2; pos = {x160, 54.6/sqrt(3)*2}
    c65: Circle "圆 65" | r = 258.3/2; pos = {x160, 54.6/sqrt(3)*2}
    c20: Circle "圆 20" (disabled) | r = 54.6/sqrt(3)*2+54.6; pos = {30000, 54.6/sqrt(3)*2}
    r2: Rectangle "海水" | size = {360000, h_water}; pos = {-100000, y_bed}
    r3: Rectangle "海泥" | size = {360000, h_mud}; pos = {-100000, y_bed-h_mud}
    r4: Rectangle "空气" | size = {360000, h_air}; pos = {-100000, y_bed+h_water}
    fin: Finalize "形成联合体"

Materials
  mat27: Common "空气" on domains 3
    def: def "Basic"
      thermalexpansioncoefficient = alpha_p(pA,T)
      molarmass = 0.02897[kg/mol]
      bulkviscosity = muB(T)
      relpermeability = 1
      relpermittivity = 1
      dynamicviscosity = eta(T)
      ratioofspecificheat = 1.4
      electricconductivity = 0[S/m]
      heatcapacity = Cp(T)
      density = rho(pA,T)
      thermalconductivity = k(T)
      soundspeed = cs(T)
      eta: Piecewise | arg = T; pieces = {200.0, 1600.0, -8.38278E-7+8.35717342E-8*T^1-7.69429583E-11*T^2+4.6437266E-14*T^3-1.06585607E-17*T^4}; argunit = K; fununit = Pa*s
      Cp: Piecewise | arg = T; pieces = {200.0, 1600.0, 1047.63657-0.372589265*T^1+9.45304214E-4*T^2-6.02409443E-7*T^3+1.2858961E-10*T^4}; argunit = K; fununit = J/(kg*K)
      rho: Analytic | expr = pA*0.02897/R_const[K*mol/J]/T; args = {pA, T}; fununit = kg/m^3; argunit = {Pa, K}
      k: Piecewise | arg = T; pieces = {200.0, 1600.0, -0.00227583562+1.15480022E-4*T^1-7.90252856E-8*T^2+4.11702505E-11*T^3-7.43864331E-15*T^4}; argunit = K; fununit = W/(m*K)
      cs: Analytic | expr = sqrt(1.4*R_const[K*mol/J]/0.02897*T); args = T; fununit = m/s; argunit = K
      an1: Analytic | funcname = alpha_p; expr = -1/rho(pA,T)*d(rho(pA,T),T); args = {pA, T}; fununit = 1/K; argunit = {Pa, K}
      an2: Analytic "Analytic 2a" | funcname = muB; expr = 0.6*eta(T); args = T; fununit = Pa*s; argunit = K
    RefractiveIndex: RefractiveIndex
      n = 1
      ki = 0
    NonlinearModel: NonlinearModel
      BA = def.gamma-1
    idealGas: idealGas
      Rs = R_const/Mn
      heatcapacity = Cp(T)
      ratioofspecificheat = 1.4
      molarmass = 0.02897[kg/mol]
      Cp: Piecewise | arg = T; pieces = {200.0, 1600.0, 1047.63657-0.372589265*T^1+9.45304214E-4*T^2-6.02409443E-7*T^3+1.2858961E-10*T^4}; argunit = K; fununit = J/(kg*K)
  mat22: Common "海水" on selection sel6
    def: def "基本"
      electricconductivity = 5
      relpermeability = 1
      relpermittivity = 80
  mat26: Common "海泥" on selection sel7
    def: def "基本"
      relpermeability = 1
      electricconductivity = 1
      relpermittivity = 30
  mat20: Common "铜导体" on selection sel1
    def: def "基本"
      electricconductivity = 5.8e7
      relpermeability = 1
      relpermittivity = 100
  mat21: Common "钢丝铠装" on selection sel5
    def: def "基本"
      electricconductivity = 1e6
      relpermeability = 200
      relpermittivity = 1
  mat23: Common "半导电材料" on selection sel2
    def: def "基本"
      relpermittivity = 10
      electricconductivity = 10
      relpermeability = 1
  mat24: Common "绝缘材料" on selection sel3
    def: def "基本"
      relpermeability = 1
      electricconductivity = 1e-15
      relpermittivity = 2.3
  mat25: Common "金属护套" on selection sel4
    def: def "基本"
      relpermeability = 1
      electricconductivity = 4.5e6
      relpermittivity = 1

Physics
  mf2: InductionCurrents "磁场" on all domains
    dependent variable A = {Ax, Ay, Az}
    d.d = 29[km]
    fsp1: FreeSpace "自由空间 1" (default)
      materialType = nonSolid
      ConstitutiveRelationBH = RelativePermeability
      ConstitutiveRelationJcE = ElectricalConductivity
      ConstitutiveRelationDE = RelativePermittivity
      delta_s = 100[m]
      freqType = from_solver
      f_typ = 50[Hz]
      f_fllb = 1[kHz]
      sigma_stab_mat = automatic
    mi1: MagneticInsulation "磁绝缘 1" (default)
      constraintOptions = pointwiseConstraints
      constraintType = symmetricConstraint
      constraintMethod = elemental
    init1: init "初始值 1" (default)
    als1: AmperesLawSolid "固体中的安培定律 1" on domains 1, 2, 4-11, 13, 15, 16, 18-20, 22-53, 55, 56, 58-60, 62-64, 66-70, 72-75, 77-79, 81-84, 86, 87, 89-91, 93-95, 97-101, 103-106, 108-110, 112-115, 117, 118, 120-122, 124-126, 128-132, 134-137, 139-141, 143-145
    coil8: Coil "直流护套" on domains 8
      CoilExcitation = CircuitCurrent
      toBeReferencedElectricalCircuitTag = cir2
      toBeCreatedElement = none
    coil9: Coil "直流铠装" on domains 5
      CoilExcitation = CircuitCurrent
      toBeReferencedElectricalCircuitTag = cir2
      toBeCreatedElement = none
    coil17: Coil "直流护套 1" on domains 17
    coil18: Coil "直流铠装 1" on domains 14
    coil1: Coil "A" on domains 30 | ConductorModel = Multi; ICoil = (827/37)[A]; N = 37; HarmonicLoss = 0
    coil2: Coil "B" on domains 49 | ConductorModel = Multi; ICoil = (827*exp(-120[deg]*j)/37)[A]; N = 37; HarmonicLoss = 0
    coil3: Coil "C" on domains 40 | ConductorModel = Multi; ICoil = (827*exp(+120[deg]*j)/37)[A]; N = 37; HarmonicLoss = 0
    coil4: Coil "护套接地A" on domains 26 | toBeReferencedElectricalCircuitTag = cir2; toBeCreatedElement = none
    coil5: Coil "护套接地B" on domains 45 | toBeReferencedElectricalCircuitTag = cir2; toBeCreatedElement = none
    coil6: Coil "护套接地C" on domains 34
      CoilExcitation = CircuitCurrent
      toBeReferencedElectricalCircuitTag = cir2
      toBeCreatedElement = none
    coil7: Coil "交流铠装" on domains 23
      CoilExcitation = CircuitCurrent
      toBeReferencedElectricalCircuitTag = cir2
      toBeCreatedElement = none
    coil10: Coil "A 1" on domains 61
    coil11: Coil "B 1" on domains 80
    coil12: Coil "C 1" on domains 71
    coil13: Coil "护套接地A 1" on domains 57
    coil14: Coil "护套接地B 1" on domains 76
    coil15: Coil "护套接地C 1" on domains 65
    coil16: Coil "交流铠装 1" on domains 54
    coil19: Coil "A 1.1" on domains 92
    coil20: Coil "B 1.1" on domains 111
    coil21: Coil "C 1.1" on domains 102
    coil22: Coil "护套接地A 1.1" on domains 88
    coil23: Coil "护套接地B 1.1" on domains 107
    coil24: Coil "护套接地C 1.1" on domains 96
    coil25: Coil "交流铠装 1.1" on domains 85
    coil26: Coil "A 1.1.1" on domains 123
    coil27: Coil "B 1.1.1" on domains 142
    coil28: Coil "C 1.1.1" on domains 133
    coil29: Coil "护套接地A 1.1.1" on domains 119
    coil30: Coil "护套接地B 1.1.1" on domains 138
    coil31: Coil "护套接地C 1.1.1" on domains 127
    coil32: Coil "交流铠装 1.1.1" on domains 116
  cir2: Circuit "电路"
    dependent variable voltages2
    gnd1: GroundNode "接地节点 1" | label = p
    R5: Resistor "电阻 5" | R = 1[Ω]; Connections = {0, 5}
    R6: Resistor "电阻 6" | R = 1[Ω]; Connections = {0, 6}
    IvsU5: ModelDeviceIV "直流护套" | Connections = {0, 5}
    IvsU6: ModelDeviceIV "直流铠装" | Connections = {0, 6}
    R7: Resistor "电阻 7" | Connections = {0, 7}
    R8: Resistor "电阻 8" | Connections = {0, 8}
    IvsU7: ModelDeviceIV "直流护套 1" | V_src = root.comp2.mf2.VCoil_17; Connections = {0, 7}
    IvsU8: ModelDeviceIV "直流铠装 1" | V_src = root.comp2.mf2.VCoil_18; Connections = {0, 8}
    R1: Resistor "电阻 1" | R = 1[Ω]; Connections = {0, 1}; label = {p, n}; hasCurrentPort = 1
    R2: Resistor "电阻 2" | R = 1[Ω]
    R3: Resistor "电阻 3" | R = 1[Ω]; Connections = {0, 3}
    R4: Resistor "电阻 4" | R = 1[Ω]; Connections = {0, 4}
    IvsU1: ModelDeviceIV "护套A" | Connections = {0, 1}
    IvsU2: ModelDeviceIV "护套B" | Connections = {0, 2}
    IvsU3: ModelDeviceIV "护套C" | Connections = {0, 3}
    IvsU4: ModelDeviceIV "交流铠装" | Connections = {0, 4}
    R9: Resistor "电阻 9" | Connections = {0, 9}
    R10: Resistor "电阻 10" | Connections = {0, 10}
    R11: Resistor "电阻 11" | Connections = {0, 11}
    R12: Resistor "电阻 12" | Connections = {0, 12}
    IvsU9: ModelDeviceIV "护套A 1" | V_src = root.comp2.mf2.VCoil_13; Connections = {0, 9}
    IvsU10: ModelDeviceIV "护套B 1" | V_src = root.comp2.mf2.VCoil_14; Connections = {0, 10}
    IvsU11: ModelDeviceIV "护套C 1" | V_src = root.comp2.mf2.VCoil_15; Connections = {0, 11}
    IvsU12: ModelDeviceIV "交流铠装 1" | V_src = root.comp2.mf2.VCoil_16; Connections = {0, 12}
    R13: Resistor "电阻 13" | Connections = {0, 13}
    R14: Resistor "电阻 14" | Connections = {0, 14}
    R15: Resistor "电阻 15" | Connections = {0, 15}
    R16: Resistor "电阻 16" | Connections = {0, 16}
    IvsU13: ModelDeviceIV "护套A 1.1" | V_src = root.comp2.mf2.VCoil_22; Connections = {0, 13}
    IvsU14: ModelDeviceIV "护套B 1.1" | V_src = root.comp2.mf2.VCoil_23; Connections = {0, 14}
    IvsU15: ModelDeviceIV "护套C 1.1" | V_src = root.comp2.mf2.VCoil_24; Connections = {0, 15}
    IvsU16: ModelDeviceIV "交流铠装 1.1" | V_src = root.comp2.mf2.VCoil_25; Connections = {0, 16}
    R17: Resistor "电阻 17" | Connections = {0, 17}
    R18: Resistor "电阻 18" | Connections = {0, 18}
    R19: Resistor "电阻 19" | Connections = {0, 19}
    R20: Resistor "电阻 20" | Connections = {0, 20}
    IvsU17: ModelDeviceIV "护套A 1.1.1" | V_src = root.comp2.mf2.VCoil_29; Connections = {0, 17}
    IvsU18: ModelDeviceIV "护套B 1.1.1" | V_src = root.comp2.mf2.VCoil_30; Connections = {0, 18}
    IvsU19: ModelDeviceIV "护套C 1.1.1" | V_src = root.comp2.mf2.VCoil_31; Connections = {0, 19}
    IvsU20: ModelDeviceIV "交流铠装 1.1.1" | V_src = root.comp2.mf2.VCoil_32; Connections = {0, 20}

Mesh
  mesh2 "网格 2" (physics-controlled)

Studies
  std2 "研究 2"
    ccc: CoilCurrentCalculation "线圈几何分析"
    freq: Frequency "频域" | plist = 50

Solver configurations
  sol1 "解 1" (study std2)
    v1: Variables "因变量 1"
    s1: Stationary "稳态求解器 1"
      dDef: Direct "直接"
      fcDef: FullyCoupled "全耦合"
    su1: StoreSolution "解存储 1"
    v2: Variables "因变量 2"
    s2: Stationary "稳态求解器 2"
      dDef: Direct "直接"
      p1: Parametric "参数化 1"
      fc1: FullyCoupled "全耦合 1"
  sol2 "解存储 1" (study std2)

Datasets
  dset1: Solution | solution = sol1
  dset2: Solution | solution = sol2

Derived values
  gev1: EvalGlobal "全局计算 1"
    data = dset1
    table = tbl1
    expr = {abs(cir2.IvsU5.v), abs(cir2.IvsU6.v), abs(cir2.IvsU7.v), abs(cir2.IvsU8.v), }
    unit = {V, V, V, V, }

Plots
  pg3: PlotGroup2D "0m处磁通密度模" | data = dset1
    surf1: Surface "表面 1" | expr = mf2.normB; descr = 磁通密度模
      sel1: Selection "选择 1" on domains 4-12
  pg7: PlotGroup2D "30m处磁通密度模" | data = dset1
    surf2: Surface "表面 1" | expr = mf2.normB; descr = 磁通密度模
      sel1: Selection "选择 1" on domains 13-21
  pg1: PlotGroup2D "60m处磁通密度" | data = dset1
    surf1: Surface "表面 1" | expr = mf2.normB
    str1: Streamline "流线 1" on boundaries 3, 4, 6, 9, 11-46, 83-172 | expr = {mf2.Bx, mf2.By}
      col1: Color "颜色表达式 1" | expr = mf2.normB
      filt1: Filter "过滤器 1" | expr = !isScalingSystemDomain
    con1: Contour "等值线 1" | expr = mf2.Az; levelrounding = off
      filt1: Filter "过滤器 1" | expr = !isScalingSystemDomain
  pg8: PlotGroup2D "80m处磁通密度" | data = dset1
    surf1: Surface "表面 1" | expr = mf2.normB
    str1: Streamline "流线 1" on boundaries 3, 4, 6, 9, 11-46, 83-172 | expr = {mf2.Bx, mf2.By}
      col1: Color "颜色表达式 1" | expr = mf2.normB
      filt1: Filter "过滤器 1" | expr = !isScalingSystemDomain
    con1: Contour "等值线 1" | expr = mf2.Az; levelrounding = off
      filt1: Filter "过滤器 1" | expr = !isScalingSystemDomain
  pg9: PlotGroup2D "140m处磁通密度" | data = dset1
    surf1: Surface "表面 1" | expr = mf2.normB
    str1: Streamline "流线 1" on boundaries 3, 4, 6, 9, 11-46, 83-172 | expr = {mf2.Bx, mf2.By}
      col1: Color "颜色表达式 1" | expr = mf2.normB
      filt1: Filter "过滤器 1" | expr = !isScalingSystemDomain
    con1: Contour "等值线 1" | expr = mf2.Az; levelrounding = off
      filt1: Filter "过滤器 1" | expr = !isScalingSystemDomain
  pg10: PlotGroup2D "160m处磁通密度" | data = dset1
    surf1: Surface "表面 1" | expr = mf2.normB
    str1: Streamline "流线 1" on boundaries 3, 4, 6, 9, 11-46, 83-172 | expr = {mf2.Bx, mf2.By}
      col1: Color "颜色表达式 1" | expr = mf2.normB
      filt1: Filter "过滤器 1" | expr = !isScalingSystemDomain
    con1: Contour "等值线 1" | expr = mf2.Az; levelrounding = off
      filt1: Filter "过滤器 1" | expr = !isScalingSystemDomain
  pg2: PlotGroup2D "0m处电流密度模" | data = dset1
    surf1: Surface "表面 1" | expr = mf2.normJ; descr = 电流密度模
      sel1: Selection "选择 1" on domains 4-12
  pg11: PlotGroup2D "30m处电流密度模" | data = dset1
    surf2: Surface "表面 1" | expr = mf2.normJ; descr = 电流密度模
      sel1: Selection "选择 1" on domains 13-21
  pg4: PlotGroup2D "0m处电流密度x分量" | data = dset1; title = 电流密度x分量 (A/m<sup>2</sup>)
    surf1: Surface "表面 1" | expr = mf2.Jx; descr = 电流密度，x 分量
      sel1: Selection "选择 1" on domains 4-12
  pg12: PlotGroup2D "0m处电流密度y分量" | data = dset1; title = 电流密度y分量 (A/m<sup>2</sup>)
    surf1: Surface "表面 1" | expr = mf2.Jy; descr = 电流密度，y 分量
      sel1: Selection "选择 1" on domains 4-12
  pg13: PlotGroup2D "0m处电流密度z分量" | data = dset1; title = 电流密度z分量 (A/m<sup>2</sup>)
    surf1: Surface "表面 1" | expr = mf2.Jz; descr = 电流密度，z 分量
      sel1: Selection "选择 1" on domains 4-12
  pg14: PlotGroup2D "30m处电流密度x分量" | data = dset1; title = 电流密度x分量 (A/m<sup>2</sup>)
    surf4: Surface "表面 1" | expr = mf2.Jx; descr = 电流密度，x 分量
      sel1: Selection "选择 1" on domains 13-21
  pg15: PlotGroup2D "30m处电流密度y分量" | data = dset1; title = 电流密度y分量 (A/m<sup>2</sup>)
    surf4: Surface "表面 1" | expr = mf2.Jy; descr = 电流密度，y 分量
      sel1: Selection "选择 1" on domains 13-21
  pg16: PlotGroup2D "30m处电流密度z分量" | data = dset1; title = 电流密度z分量 (A/m<sup>2</sup>)
    surf4: Surface "表面 4" | expr = mf2.Jz; descr = 电流密度，z 分量
      sel1: Selection "选择 1" on domains 13-21
  pg5: PlotGroup2D "0m处感应电压" | data = dset1; title = 表面: 直流护套上的电压 (V) 表面: 直流铠装上的电压 (V)
    surf1: Surface "表面 1" | expr = abs(cir2.IvsU5.v)
      sel1: Selection "选择 1" on domains 4-12
    surf2: Surface "表面 2" | expr = abs(cir2.IvsU6.v)
      sel1: Selection "选择 1" on domains 4-12
  pg6: PlotGroup2D "30m处感应电压" | data = dset1; title = 表面: 直流护套上的电压 (V) 表面: 直流铠装上的电压 (V)
    surf1: Surface "表面 1" | expr = abs(cir2.IvsU7.v)
      sel1: Selection "选择 1" on domains 13-21
    surf2: Surface "表面 2" | expr = abs(cir2.IvsU8.v)
      sel1: Selection "选择 1" on domains 13-52